// COMSOL Multiphysics 6.1.0.252 model "COMSOL simulation of piezoelectric materials and devices.mph"
// Outline of the model tree

Common definitions
  mpf1: ParticipationFactors "参与因子 1"

Geometry
  geom1 "几何 1" (3D, length unit mm)
    wp1: WorkPlane "工作平面 1" | unite = on
      c1: Circle "圆 1" | r = 27; angle = 20
    ext1: Extrude "拉伸 1"
      workplane = wp1
      input = wp1
      distance = {5, 5+0.275, 5+0.275+10}
      scale = {{1, 1}, {1, 1}, {1, 1}}
      displ = {{0, 0}, {0, 0}, {0, 0}}
      twist = {0, 0, 0}
      baseid = {0, 1, 3, 4, 5, 6, 2}
    fin: Finalize "形成联合体"

Materials
  mat1: Common "材料 1" on domains 1
    def "基本"
      density = 7730
    StressCharge "应力-电荷型"
      cE = {128[GPa], 68[GPa], 68[GPa], 0, 0, 0, 68[GPa], 128[GPa], 68[GPa], 0, 0, 0, 68[GPa], 68[GPa], 110[GPa], 0, 0, 0, 0, 0, 0, 21[GPa], 0, 0, 0, 0, 0, 0, 21[GPa], 0, 0, 0, 0, 0, 0, 21[GPa]}
      eES = {0, 0, -6.1, 0, 0, -6.1, 0, 0, 15.7, 0, 0, 0, 0, 0, 0, 0, 0, 0}
      epsilonrS = 993.54
      eta_cE = {0, 0, 0, 0, 0, 0, 0, 0, 0, 0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}
      eta_eES = {0, 0, 0, 0, 0, 0, 0, 0, 0, 0, 0, 0, 0, 0, 0, 0, 0, 0}
      eta_epsilonS = 0
  mat2: Common "材料 2" on domains 2
    def "基本"
      density = 1700
    Enu "杨氏模量和泊松比"
      E = 10[GPa]
      nu = 0.38
  mat3: Common "Aluminum" on domains 3
    def "Basic"
      relpermeability = 1
      heatcapacity = 900[J/(kg*K)]
      thermalconductivity = 238[W/(m*K)]
      electricconductivity = 3.774e7[S/m]
      relpermittivity = 1
      thermalexpansioncoefficient = 23e-6[1/K]
      density = 2700[kg/m^3]
    Enu "Young's modulus and Poisson's ratio"
      E = 70[GPa]
      nu = 0.33
    Murnaghan
      l = -250[GPa]
      m = -330[GPa]
      n = -350[GPa]

Physics
  solid: SolidMechanics "固体力学" on all domains
    dependent variable u = {u, v, w}
    lemm1: LinearElasticModel "线弹性材料 1" (default)
    free1: Free "自由 1" (default)
    init1: init "初始值 1" (default)
    pzm1: PiezoelectricMaterialModel "压电材料 1" on domains 1
    sym1: SymmetrySolid "对称 1" on boundaries 1-5, 7, 8
  es: Electrostatics "静电" on domains 1
    dependent variable V
    ccn1: ChargeConservation "电荷守恒 1" (default)
    zc1: ZeroCharge "零电荷 1" (default)
    init1: init "初始值 1" (default)
    ccnp1: ChargeConservationPiezo "电荷守恒，压电 1" on domains 1
    gnd1: Ground "接地 1" on boundaries 3
    term1: Terminal "终端 1" on boundaries 6 | TerminalType = Voltage; V0 = 0.5; Q0 = 0.5

Multiphysics
  pze1: PiezoelectricEffect "压电效应 1" on all domains | Solid_physics = solid; Electrostatics_physics = es

Mesh
  mesh1 "网格 1"
    size: MeshSizeDefault "大小" | hauto = 7
    ftri1: FreeTri "自由三角形网格 1" on boundaries 10
      size1: Size "大小 1" on boundaries 10 | hauto = 3
    swe1: Sweep "扫掠 1" on remaining entities

Studies
  std1 "研究 1"
    eig: Eigenfrequency "特征频率" | shift = 1[Hz]; conrad = 1; linpsolnum = auto
  std2 "研究 2"
    freq: Frequency "频域" | punit = kHz; plist = range(20,1,110)

Solver configurations
  sol1 "解 1" (study std1)
    v1: Variables "因变量 1"
    e1: Eigenvalue "特征值求解器 1" | eigvfunscale = maximum; eigvfunscaleparam = 3.24E-8
      dDef: Direct "直接"
  sol2 "解 2" (study std2)
    v1: Variables "因变量 1"
    s1: Stationary "稳态求解器 1" | linpmethod = sol
      p1: Parametric "参数化 1" | pname = freq; plistarr = range(20,1,110); punit = kHz; pcontinuationmode = no
      fc1: FullyCoupled "全耦合 1" | linsolver = d1
      d1: Direct "建议的直接求解器 (pze1) (已合并)" | linsolver = pardiso; pivotperturb = 1.0E-9

Datasets
  dset1: Solution | solution = sol1
  dset2: Solution | solution = sol2

Evaluation groups
  std1EvgFrq: EvaluationGroup "特征频率 (研究 1)" | data = dset1
    gev1: EvalGlobal "全局计算 1"
      expr = {freq*2*pi, imag(freq)/abs(freq), abs(freq)/imag(freq)/2}
      unit = {rad/s, 1, 1}
      descr = {角频率, 阻尼比, 品质因子}
  std1mpf1: EvaluationGroup "参与因子 (研究 1)" | data = dset1
    gev1: EvalGlobal "全局计算 1"
      expr = {mpf1.pfLnormX, mpf1.pfLnormY, mpf1.pfLnormZ, mpf1.pfRnormX, mpf1.pfRnormY, mpf1.pfRnormZ, mpf1.mEffLX, mpf1.mEffLY, mpf1.mEffLZ, mpf1.mEffRX, mpf1.mEffRY, mpf1.mEffRZ}
      unit = {1, 1, 1, 1, 1, 1, kg, kg, kg, kg*m^2, kg*m^2, kg*m^2}
      descr = {参与因子，归一化，X 平移, 参与因子，归一化，Y 平移, 参与因子，归一化，Z 平移, 参与因子，归一化，X 旋转, 参与因子，归一化，Y 旋转, 参与因子，归一化，Z 旋转, 有效模态质量，X 平移, 有效模态质量，Y 平移, 有效模态质量，Z 平移, 有效模态质量，X 旋转, 有效模态质量，Y 旋转, 有效模态质量，Z 旋转}

Plots
  pg1: PlotGroup3D "振型 (solid)" | data = dset1
    surf1: Surface "表面 1" | expr = solid.disp
      def: Deform "变形" | expr = {u, v, w}; descr = 位移场
  pg2: PlotGroup3D "电势 (es)" | data = dset1
    mslc1: Multislice "多切面 1"
      expr = V
      multiplanexmethod = coord
      xcoord = es.CPx
      multiplaneymethod = coord
      ycoord = es.CPy
      multiplanezmethod = coord
      zcoord = es.CPz
    strmsl1: StreamlineMultislice "流线多切面 1"
      expr = {es.Ex, es.Ey, es.Ez}
      multiplanexmethod = coord
      xcoord = es.CPx
      multiplaneymethod = coord
      ycoord = es.CPy
      multiplanezmethod = coord
      zcoord = es.CPz
      udist = 0.02
      col1: Color "颜色表达式 1" | expr = V
      filt1: Filter "过滤器 1" | expr = !isScalingSystemDomain
  pg3: PlotGroup3D "电场模 (es)" | data = dset1
    mslc1: Multislice "多切面 1"
      expr = es.normE
      multiplanexmethod = coord
      xcoord = es.CPx
      multiplaneymethod = coord
      ycoord = es.CPy
      multiplanezmethod = coord
      zcoord = es.CPz
    strmsl1: StreamlineMultislice "流线多切面 1"
      expr = {es.Ex, es.Ey, es.Ez}
      multiplanexmethod = coord
      xcoord = es.CPx
      multiplaneymethod = coord
      ycoord = es.CPy
      multiplanezmethod = coord
      zcoord = es.CPz
      udist = 0.02
      col1: Color "颜色表达式 1" | expr = es.normE
      filt1: Filter "过滤器 1" | expr = !isScalingSystemDomain
  pg4: PlotGroup3D "应力 (solid)" | data = dset2
    vol1: Volume "体 1" | expr = solid.mises_peak
      def: Deform "变形" | expr = {u, v, w}; descr = 位移场
  pg5: PlotGroup3D "电势 (es) 1" | data = dset2
    mslc1: Multislice "多切面 1"
      expr = V
      multiplanexmethod = coord
      xcoord = es.CPx
      multiplaneymethod = coord
      ycoord = es.CPy
      multiplanezmethod = coord
      zcoord = es.CPz
    strmsl1: StreamlineMultislice "流线多切面 1"
      expr = {es.Ex, es.Ey, es.Ez}
      multiplanexmethod = coord
      xcoord = es.CPx
      multiplaneymethod = coord
      ycoord = es.CPy
      multiplanezmethod = coord
      zcoord = es.CPz
      udist = 0.02
      col1: Color "颜色表达式 1" | expr = V
      filt1: Filter "过滤器 1" | expr = !isScalingSystemDomain
  pg6: PlotGroup3D "电场模 (es) 1" | data = dset2
    mslc1: Multislice "多切面 1"
      expr = es.normE
      multiplanexmethod = coord
      xcoord = es.CPx
      multiplaneymethod = coord
      ycoord = es.CPy
      multiplanezmethod = coord
      zcoord = es.CPz
    strmsl1: StreamlineMultislice "流线多切面 1"
      expr = {es.Ex, es.Ey, es.Ez}
      multiplanexmethod = coord
      xcoord = es.CPx
      multiplaneymethod = coord
      ycoord = es.CPy
      multiplanezmethod = coord
      zcoord = es.CPz
      udist = 0.02
      col1: Color "颜色表达式 1" | expr = es.normE
      filt1: Filter "过滤器 1" | expr = !isScalingSystemDomain
  pg7: PlotGroup1D "一维绘图组 7" | data = dset2; xlabel = freq (kHz)
    glob1: Global "全局 1" | data = dset2; expr = imag(es.Y11); descr = Impedance

Exports
  anim1: Animation "动画 1" | target = player; maxframes = 91; synchronize = off